*Heading
** Job name: quarter Model name: quarterbuckle
** Generated by: Abaqus/CAE 2021
*Preprint, echo=NO, model=NO, history=NO, contact=NO
**
** PARTS
**
*Part, name=Part-1
*End Part
**
**
** ASSEMBLY
**
*Assembly, name=Assembly
**
*Instance, name=Part-1-1, part=Part-1
*Node
      1,           0.,           0.,         300.
      2,          50.,           0.,         300.
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*Element, type=S4R
  1,    1,   48, 1597,  121
  2,   48,   49, 1598, 1597
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*Node
  13573,   6.28000021,          25.,        1000.
*Nset, nset=Part-1-1-RefPt_, internal
13573,
*Nset, nset=Set-1
     2,     3,     9,    10,    11,    12
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*Elset, elset=Set-1
   677,   678,   679,   680,   681,   682
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*Nset, nset=Set-2
     1,     2,     3,     4,     5,     6
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*Elset, elset=Set-2
     1,     2,     3,     4,     5,     6
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*Nset, nset=Set-3
     1,     4,     5,     6,     7,     8
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*Elset, elset=Set-3
   339,   340,   341,   342,   343,   344
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*Nset, nset=Set-4
     2,     3,     9,    10,    11,    16
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*Elset, elset=Set-4
   677,   678,   679,   680,   681,   682
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*Nset, nset=Set-5
    11,    12,    13,    14,    15,    23
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*Elset, elset=Set-5
  1184,  1185,  1186,  1187,  1188,  1189
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*Nset, nset=Force
    1,    2,    3,    4,    5,    6
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*Elset, elset=Force
     1,    13,    14,    26,    27,    39
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*Nset, nset=LETop
  3,  6, 12, 20, 21, 28, 34, 38, 41, 43
*Nset, nset=LEBottom
  8, 19, 22, 25, 27, 30, 33, 39, 40
*Nset, nset=TETop
  7, 11, 15, 18, 24, 35, 36, 37, 42, 47
*Nset, nset=TEBottom
  4, 13, 14, 23, 29, 31, 32, 44, 45, 46
** Section: Flange
*Shell Section, elset=Set-2, composite, symmetric
0.125, 3, CFRP, 90.
0.125, 3, CFRP, 90.
0.125, 3, CFRP, 90.
0.125, 3, CFRP, 90.
0.125, 3, CFRP, 90.
0.125, 3, CFRP, 90.
0.02, 3, GFRP, 65.
0.125, 3, CFRP, 115.
0.02, 3, GFRP, 115.
0.125, 3, CFRP, 115.
** Section: shear web
*Shell Section, elset=Set-3, composite, symmetric
0.125, 3, CFRP, 90.
0.02, 3, GFRP, 65.
0.125, 3, CFRP, 115.
0.02, 3, GFRP, 115.
0.125, 3, CFRP, 115.
** Section: buckle
*Shell Section, elset=Set-4, composite, layup=Buckle, symmetric
0.02, 3, GFRP, 115.
0.125, 3, CFRP, 115.
** Section: shear web
*Shell Section, elset=Set-5, composite, symmetric
0.125, 3, CFRP, 90.
0.02, 3, GFRP, 65.
0.125, 3, CFRP, 115.
0.02, 3, GFRP, 115.
0.125, 3, CFRP, 115.
*End Instance
**
*Node
      1,          25.,          25.,         200.
*Node
      2,   6.26000023,          25.,         400.
*Node
      3,   6.28000021,          25.,         600.
*Node
      4,   6.28000021,          25.,         800.
*Node
      5,          25.,          25.,         100.
*Node
      6,   6.28000021,          25.,         300.
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*Nset, nset=Set-1, instance=Part-1-1
   40,   41,   45,   47, 1104, 1105
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*Elset, elset=Set-1, instance=Part-1-1
  6241,  6242,  6243,  6244,  6245,  6246
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*Nset, nset=Set-6, instance=Part-1-1
   21,   22,   24,   46,  490,  491
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*Elset, elset=Set-6, instance=Part-1-1
  2523,  2524,  2525,  2526,  2527,  2528
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*Nset, nset=Set-7, instance=Part-1-1
   21,   22,   24,   46,  490,  491
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*Elset, elset=Set-7, instance=Part-1-1
  2523,  2524,  2525,  2526,  2527,  2528
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*Nset, nset=Set-14, instance=Part-1-1
 13573,
*Nset, nset=Set-15, instance=Part-1-1
 13573,
*Nset, nset=Set-16, instance=Part-1-1
   21,   22,   24,   46,  490,  491
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*Elset, elset=Set-16, instance=Part-1-1
  2523,  2524,  2525,  2526,  2527,  2528
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*Elset, elset=Set-42, instance=Part-1-1
  2523,  2524,  2525,  2526,  2527,  2528
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*Nset, nset=Set-43, instance=Part-1-1
 13573,
*Nset, nset=Set-43, generate
 1,  9,  1
*Nset, nset=Set-46
 5,
*Nset, nset=Set-47
 1,
*Nset, nset=Set-48
 6,
*Nset, nset=Set-49
 2,
*Nset, nset=Set-50
 7,
*Nset, nset=Set-51
 3,
*Nset, nset=Set-52
 8,
*Nset, nset=Set-53
 4,
*Nset, nset=Set-54
 9,
*Nset, nset=Set-55, instance=Part-1-1
 13573,
*Nset, nset=m_Set-12, instance=Part-1-1
 13573,
*Nset, nset=m_Set-31
 5,
*Nset, nset=m_Set-33
 6,
*Nset, nset=m_Set-35
 7,
*Nset, nset=m_Set-37
 8,
*Nset, nset=m_Set-39
 9,
*Nset, nset=m_Set-44
 6,
*Nset, nset=s_Set-12, instance=Part-1-1
   40,   41,   45,   47, 1104, 1105
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*Elset, elset=s_Set-12, instance=Part-1-1
  6241,  6242,  6243,  6244,  6245,  6246
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*Nset, nset=s_Set-31, instance=Part-1-1
 14, 15, 19, 20
*Nset, nset=s_Set-35, instance=Part-1-1
  6, 11, 23, 25
*Nset, nset=s_Set-37, instance=Part-1-1
 30, 31, 34, 35
*Nset, nset=s_Set-39, instance=Part-1-1
 38, 39, 42, 44
*Nset, nset=s_Set-43, instance=Part-1-1
 16, 17, 25, 26
*Nset, nset=s_Set-44, instance=Part-1-1
 1, 2, 5, 9
*Nset, nset=_PickedSet51, internal, instance=Part-1-1
  7,  8, 12, 13
*Nset, nset=_PickedSet52, internal
 1,
*Nset, nset=_PickedSet53, internal, instance=Part-1-1
  3,  4, 18
*Nset, nset=_PickedSet54, internal
 2,
*Nset, nset=_PickedSet55, internal, instance=Part-1-1
 27, 28, 29, 37
*Nset, nset=_PickedSet56, internal
 3,
*Nset, nset=_PickedSet57, internal, instance=Part-1-1
 32, 33, 36, 43
*Nset, nset=_PickedSet58, internal
 4,
*Nset, nset=_PickedSet59, internal, instance=Part-1-1
 40, 41, 45, 47
*Nset, nset=_PickedSet60, internal, instance=Part-1-1
 13573,
*Surface, type=NODE, name=_PickedSet51_CNS_, internal
_PickedSet51, 1.
*Surface, type=NODE, name=_PickedSet53_CNS_, internal
_PickedSet53, 1.
*Surface, type=NODE, name=_PickedSet55_CNS_, internal
_PickedSet55, 1.
*Surface, type=NODE, name=_PickedSet57_CNS_, internal
_PickedSet57, 1.
*Surface, type=NODE, name=_PickedSet59_CNS_, internal
_PickedSet59, 1.
*Surface, type=NODE, name=s_Set-31_CNS_, internal
s_Set-31, 1.
*Surface, type=NODE, name=s_Set-43_CNS_, internal
s_Set-43, 1.
*Surface, type=NODE, name=s_Set-37_CNS_, internal
s_Set-37, 1.
*Surface, type=NODE, name=s_Set-39_CNS_, internal
s_Set-39, 1.
*Surface, type=NODE, name=s_Set-44_CNS_, internal
s_Set-44, 1.
** Constraint: Constraint-1
*Coupling, constraint name=Constraint-1, ref node=_PickedSet52, surface=_PickedSet51_CNS_
*Distributing, weighting method=UNIFORM, coupling=STRUCTURAL
** Constraint: Constraint-2
*Coupling, constraint name=Constraint-2, ref node=_PickedSet54, surface=_PickedSet53_CNS_
*Distributing, weighting method=UNIFORM, coupling=STRUCTURAL
** Constraint: Constraint-3
*Coupling, constraint name=Constraint-3, ref node=_PickedSet56, surface=_PickedSet55_CNS_
*Distributing, weighting method=UNIFORM, coupling=STRUCTURAL
** Constraint: Constraint-4
*Coupling, constraint name=Constraint-4, ref node=_PickedSet58, surface=_PickedSet57_CNS_
*Distributing, weighting method=UNIFORM, coupling=STRUCTURAL
** Constraint: Constraint-5
*Coupling, constraint name=Constraint-5, ref node=_PickedSet60, surface=_PickedSet59_CNS_
*Distributing, weighting method=UNIFORM, coupling=STRUCTURAL
** Constraint: Constraint-6
*Coupling, constraint name=Constraint-6, ref node=m_Set-31, surface=s_Set-31_CNS_
*Distributing, weighting method=UNIFORM, coupling=STRUCTURAL
** Constraint: Constraint-8
*Coupling, constraint name=Constraint-8, ref node=m_Set-35, surface=s_Set-43_CNS_
*Distributing, weighting method=UNIFORM, coupling=STRUCTURAL
** Constraint: Constraint-9
*Coupling, constraint name=Constraint-9, ref node=m_Set-37, surface=s_Set-37_CNS_
*Distributing, weighting method=UNIFORM, coupling=STRUCTURAL
** Constraint: Constraint-10
*Coupling, constraint name=Constraint-10, ref node=m_Set-39, surface=s_Set-39_CNS_
*Distributing, weighting method=UNIFORM, coupling=STRUCTURAL
** Constraint: Constraint-11
*Coupling, constraint name=Constraint-11, ref node=m_Set-44, surface=s_Set-44_CNS_
*Distributing, weighting method=UNIFORM, coupling=STRUCTURAL
*End Assembly
**
** MATERIALS
**
*Material, name=CFRP
*Density
0.,
*Elastic, type=LAMINA
135000.,10000.,   0.3, 5000., 5000., 5000.
*Fail Stress
1250.,1000.,  45., 225.,  65.,   1.,   0.
*Material, name=GFRP
*Elastic, type=LAMINA
25000.,25000.,   0.2, 4000., 4000., 4000.
*Fail Stress
1000.,650., 30.,110., 40.,  1.,  0.
** ----------------------------------------------------------------
**
** STEP: nlan
**
*Step, name=nlan, nlgeom=YES, inc=300
*Static, riks
0.01, 1., 1e-15, 0.05, 1.,
**
** BOUNDARY CONDITIONS
**
** Name: BC-2 Type: Displacement/Rotation
*Boundary
Set-7, 1, 1
Set-7, 2, 2
Set-7, 3, 3
Set-7, 4, 4
Set-7, 5, 5
Set-7, 6, 6
**
** LOADS
**
** Name: L-100   Type: Concentrated force
*Cload
Set-46, 2, 93.0959
** Name: L-200   Type: Concentrated force
*Cload
Set-47, 2, 93.1193
** Name: L-300   Type: Concentrated force
*Cload
Set-48, 2, 93.1292
** Name: L-400   Type: Concentrated force
*Cload
Set-49, 2, 93.1044
** Name: L-500   Type: Concentrated force
*Cload
Set-50, 2, 93.0657
** Name: L-600   Type: Concentrated force
*Cload
Set-51, 2, 93.0086
** Name: L-700   Type: Concentrated force
*Cload
Set-52, 2, 92.9423
** Name: L-800   Type: Concentrated force
*Cload
Set-53, 2, 92.9128
** Name: L-900   Type: Concentrated force
*Cload
Set-54, 2, 92.9053
** Name: L-1000   Type: Concentrated force
*Cload
Set-55, 2, 92.9012
**
** OUTPUT REQUESTS
**
*Restart, write, frequency=0
**
** FIELD OUTPUT: F-Output-2
**
*Output, field
*Node Output
CF, RF, U
*Element Output, directions=YES
CFAILURE, EEQUT, LE, MVF, PE, PEEQ, PEMAG, S, SEQUT, TE, TEEQ, TEVOL
*Contact Output
CDISP, CSTRESS
**
** FIELD OUTPUT: LEBottom
**
*Node Output, nset=Part-1-1.LEBottom
U,
**
** FIELD OUTPUT: Disps, LETop
**
*Node Output, nset=Part-1-1.LETop
U,
**
** FIELD OUTPUT: TEBottom
**
*Node Output, nset=Part-1-1.TEBottom
U,
**
** FIELD OUTPUT: TETop
**
*Node Output, nset=Part-1-1.TETop
U,
**
** HISTORY OUTPUT: H-Output-2
**
*Output, history
*Node Output, nset=Set-43
UR3,
**
** HISTORY OUTPUT: H-Output-3
**
*Node Output, nset=Set-46
UR3,
**
** HISTORY OUTPUT: H-Output-4
**
*Node Output, nset=Set-47
UR3,
**
** HISTORY OUTPUT: H-Output-5
**
*Node Output, nset=Set-48
UR3,
**
** HISTORY OUTPUT: H-Output-6
**
*Node Output, nset=Set-49
UR3,
**
** HISTORY OUTPUT: H-Output-7
**
*Node Output, nset=Set-50
UR3,
**
** HISTORY OUTPUT: H-Output-8
**
*Node Output, nset=Set-51
UR3,
**
** HISTORY OUTPUT: H-Output-9
**
*Node Output, nset=Set-52
UR3,
**
** HISTORY OUTPUT: H-Output-10
**
*Node Output, nset=Set-53
UR3,
**
** HISTORY OUTPUT: H-Output-11
**
*Node Output, nset=Set-54
UR3,
**
** HISTORY OUTPUT: H-Output-12
**
*Node Output, nset=Set-55
UR3,
**
** HISTORY OUTPUT: H-Output-1
**
*Output, history, variable=PRESELECT
*End Step
